// COMSOL Multiphysics 6.4.0.293 model "parallel_plate_capacitor.mph"
// Outline of the model tree

Parameters
  Lx = 0.05 [m]
  Ly = 0.05 [m]
  epsr = 1

Coordinate systems
  ie1: InfiniteElement "Infinite Element Domain 1" on domains 2 | ScalingType = Cylindrical

Geometry
  geom1 "Geometry 1" (2D, length unit m)
    c1: Circle | r = 30*Lx
    ls1: LineSegment | specify1 = coord; coord1 = {-Lx/2, Ly/2}; specify2 = coord; coord2 = {Lx/2, Ly/2}
    ls2: LineSegment | specify1 = coord; coord1 = {-Lx/2, -Ly/2}; specify2 = coord; coord2 = {Lx/2, -Ly/2}
    c2: Circle | r = 32*Lx
    fin: Finalize "Form Union"

Materials
  mat1: Common "Perfect vacuum" on all domains
    def: def "Basic"
      density = 0[kg/m^3]
      relpermeability = 1
      relpermittivity = 1
      electricconductivity = 0[S/m]

Physics
  es: Electrostatics on all domains
    dependent variable V
    fsp1: FreeSpace (default)
    zc1: ZeroCharge (default)
    init1: init "Initial Values 1" (default)
    pot1: ElectricPotential on boundaries 2 | V0 = 0.5 [V]
    pot2: ElectricPotential on boundaries 1 | V0 = -0.5 [V]

Mesh
  mesh1 "Mesh 1"
    size: MeshSizeDefault | hmax = 0.214; hmin = 9.6E-4; hcurve = 0.3; hgrad = 1.3
    dis1: Distribution on boundaries 1, 2 | numelem = 1000
    ftri1: FreeTri "Free Triangular 1" on domains 1
      size1: Size on domains 1 | hauto = 1

Studies
  std1 "Study 1"
    stat: Stationary

Solver configurations
  sol1 "Solution 1" (study std1)
    v1: Variables "Dependent Variables 1"
    s1: Stationary "Stationary Solver 1"
      dDef: Direct
      fc1: FullyCoupled

Datasets
  dset1: Solution | solution = sol1

Derived values
  int1: IntLine "Line Integration 1" on boundaries 2 | data = dset1; table = tbl1; expr = es.nD/1[V]
  int2: IntSurface "Surface Integration 2" on domains 1 | data = dset1; table = tbl3; expr = 2*es.W/1[V^2]

Plots
  pg1: PlotGroup2D "Electric Potential (es)" | data = dset1
    con1: Contour | expr = V
  pg2: PlotGroup2D "Electric Field (es)" | data = dset1
    surf1: Surface | expr = es.normE
  pg3: PlotGroup1D "1D Plot Group 3" | data = dset1
    lngr1: LineGraph on boundaries 2 | expr = es.nD; descr = Surface charge density; xdata = expr; xdataexpr = x